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/batch
! ANSYS input file written by Workbench version 2019 R3
! File used for geometry attach: C:\Users\pedeb\Desktop\HTE\Compliant\Empty\FEM_files\user_files\V1.SLDPRT
/title,FEM--Static Structural (B5)
/com,--- Data in consistent NMM units. See Solving Units in the help system for more information.
/units,MPA
/prep7
! Turn off shape checking because checks already performed inside WB mesher.
! See help system for more information.
SHPP,OFF,,NOWARN
etcon,set             ! allow ANSYS to choose best KEYOP's for 180x elements
/com,*********** Nodes for the whole assembly ***********
nblock,3,,15875
(1i9,3e20.9e3)
        1     5.856482668E+01     6.854032246E+01     2.400000000E+00
        2     5.856482668E+01     6.854032246E+01     1.800000000E+00
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-1
/com,*********** Elements for Body 1 "V1" ***********
et,1,186
keyo,1,2,1          ! set full integration on SOLID186
eblock,19,solid,,2455
(19i9)
        1        1        1        1        0        0        0        0       20        0        1     2589     2604     2620     3669     2590     2605     2619     3670
    11787    11828    11861    11788    11790    11831    11860    11791    11785    11825    11859    13996
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-1
/com,*********** Send User Defined Coordinate System(s) ***********
csys,0
toffst,273.15,  ! Temperature offset from absolute zero
/com,*********** Set Reference Temperature ***********
tref,22.
/com,*********** Send Materials ***********
MP,DENS,1,1.29e-09,	! tonne mm^-3
MP,EX,1,2540,	! tonne s^-2 mm^-1
MP,NUXY,1,0.2,

!************************* Model Summary ********************
!V1,	PLA,	matid,	1
!************************* End Model Summary ********************
CMBLOCK,_CM32_FIXEDSU,NODE,       84
(8i10)
      3246      3247      3248      3249      3250      3251      3252      3253
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/com,*********** Create Displacement Components For Use In Future MSUP Analysis ******
CMBLOCK,_CM39_DISP,NODE,       84
(8i10)
      2581      2582      2583      2584      2585      2586      2587      2588
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/com,*********** Create Displacement Components For Use In Future MSUP Analysis ******
CMBLOCK,_CM39_DISP,NODE,       84
(8i10)
      2581      2582      2583      2584      2585      2586      2587      2588
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/com,*********** Create Displacement Components For Use In Future MSUP Analysis ******
CMBLOCK,_CM39_DISP,NODE,       84
(8i10)
      2581      2582      2583      2584      2585      2586      2587      2588
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/com,*********** Fixed Supports ***********
CMBLOCK,_FIXEDSU,NODE,       84
(8i10)
      3246      3247      3248      3249      3250      3251      3252      3253
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cmsel,s,_FIXEDSU
d,all,all
nsel,all
/com,******* Constant Zero Displacement X *******
CMBLOCK,_DISPZEROUX,NODE,       84
(8i10)
      2581      2582      2583      2584      2585      2586      2587      2588
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cmsel,s,_DISPZEROUX
d,all,ux,0
nsel,all
/com,******* Constant Zero Displacement Z *******
CMBLOCK,_DISPZEROUZ,NODE,       84
(8i10)
      2581      2582      2583      2584      2585      2586      2587      2588
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cmsel,s,_DISPZEROUZ
d,all,uz,0
nsel,all
/com,*********** Create Displacement Tables and Functions ******

*DIM,_loadvari39yp,TABLE,3,1,1,TIME,
! Time values
_loadvari39yp(1,0,1) = 0.
_loadvari39yp(2,0,1) = 1.
_loadvari39yp(3,0,1) = 2.
! Load values
_loadvari39yp(1,1,1) = 0.
_loadvari39yp(2,1,1) = -5.
_loadvari39yp(3,1,1) = -8.


*DIM,_loadvari39yn,TABLE,3,1,1,TIME,
! Time values
_loadvari39yn(1,0,1) = 0.
_loadvari39yn(2,0,1) = 1.
_loadvari39yn(3,0,1) = 2.
! Load values
_loadvari39yn(1,1,1) = 0.
_loadvari39yn(2,1,1) = 5.
_loadvari39yn(3,1,1) = 8.

fini
/com,****************************************************************************
/com,*************************    SOLUTION       ********************************
/com,****************************************************************************
/solu
antype,0                   ! static analysis
nlgeom,on                  ! Turn on Large Deformation Effects
_thickRatio=  1     ! Ratio of thick parts in the model
eqsl,pcg,1e-8,,,,,,1
cntr,print,1               ! print out contact info and also make no initial contact an error
nldiag,cont,iter           ! print out contact info each equilibrium iteration
rescontrol,define,last           ! Turn on restart files due to future eigen analysis intent
/com,****************************************************
/com,******************* SOLVE FOR LS 1 OF 3 ****************
/com,*** Set Displacements ***
CMBLOCK,_CM39UY_YP,NODE,       84
(8i10)
      2581      2582      2583      2584      2585      2586      2587      2588
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cmsel,s,_CM39UY_YP
d,all,uy,%_loadvari39yp%
nsel,all

/com,*** Component For All Non-Zero UY Displacements ***
cmsel,s,_CM39uy_yp
cm,_DISPNONZEROUY,NODE
nsel,all

autots,on                  ! Workbench Program Controlled automatic time stepping
nsub,1,10,1                ! due to presence of general nonlinear
time,1.
outres,erase
outres,all,none
outres,nsol,all,
outres,rsol,all
outres,eangl,all
outres,etmp,all
outres,veng,all
outres,strs,all,
outres,epel,all,
outres,eppl,all,
outres,cont,all,
! *********** WB SOLVE COMMAND ***********
! check interactive state
*get,ANSINTER_,active,,int
*if,ANSINTER_,ne,0,then
/eof
*endif
solve
/com *************** Write FE CONNECTORS *********
CEWRITE,file,ce,,INTE
/com,****************************************************
/com,*************** FINISHED SOLVE FOR LS 1 *************
/com,****************************************************
/com,******************* SOLVE FOR LS 2 OF 3 ****************
/com,*** Set Displacements ***
autots,on                  ! Workbench Program Controlled automatic time stepping
nsub,1,10,1                ! due to presence of general nonlinear
time,2.
outres,erase
outres,all,none
outres,nsol,all,
outres,rsol,all
outres,eangl,all
outres,etmp,all
outres,veng,all
outres,strs,all,
outres,epel,all,
outres,eppl,all,
outres,cont,all,
solve
/com,****************************************************
/com,*************** FINISHED SOLVE FOR LS 2 *************
/com,****************************************************
/com,******************* SOLVE FOR LS 3 OF 3 ****************
/com,*** Set Displacements ***
autots,on                   ! User turned on automatic time stepping
deltim,0.2,0.0384615,1,OFF
time,3.
outres,erase
outres,all,none
outres,nsol,all,
outres,rsol,all
outres,eangl,all
outres,etmp,all
outres,veng,all
outres,strs,all,
outres,epel,all,
outres,eppl,all,
outres,cont,all,
solve
/com,****************************************************
/com,*************** FINISHED SOLVE FOR LS 3 *************
*get,_PCGITER,active,,solu,cgiter
/post1
fini
